# Задание 1
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x := 2
n := 3
sin(45*π/180) = 0.707107
y := (sqrt(x^3 + n) + cos(|n*x - 1|)^2)/(nthroot(x^5 + sin(x) + n, 4)*cos(π/4*(x + n)))
y = -1.96255
round(y, 4) = -1.9625
# Задание 2
e = 2.71828
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log(100)/log(10) = 2
x := 7
y := 10
z := -3
log(100, 10) = 2
p := if(x > y, sin(x) + 3*|y| - z^2, (y + 3)*ln(|x + 1|)/sqrt(z^2 + 1))
p = 8.5485
q := if((x > y) and x < 1, cos(x) + 2*|y + 1|, (x*y + 3)/sqrt(y^2 + 5))
q = 7.12407
w := if((x < y) or (y ≥ 10), x^2 + 2*(y*x + 1) - z, (x^-3*y^2 + 3)*sqrt(z^2 + 7))
w = 194
# Задание 3
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Δx := 0.4
n := 4
x := -2, -2 + Δx .. 2
f(x) := (x^2 - (n*x) + sin(x))*sqrt(|x - cos(n*x)|)
x = [-2; -1.6; -1.2; -0.8; -0.4; 0; 0.4; 0.8; 1.2; 1.6; 2]
f(x) = [15.1033; 12.819; 6.02284; 1.39052; 0.834594; 0; -0.688271; -2.47099; -2.5609; -2.21264; -4.52711]
f(45) = 12464.4
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# Задание 4
# С шаблонами
n := 7
a := -3*n
b := 3*n
a = -21
b = 21
A := runif(3, a, b)
B := runif(3, a, b)
C := runif(3, a, b)
A = [-20.9467; -12.8804; 3.57026]
B = [-6.28706; 13.5592; -13.6866]
C = [8.84081; -8.23259; -17.1607]
s := A*B
s = -91.8195
V := B×C
V = [-345.361; -228.891; -68.1154]
w := (A×B)*C
w = 9939.22
# Без шаблонов
skalar := (A[0]*B[0] + A[1]*B[1] + A[2]*B[2])
skalar = -91.8195
vector := [B[1]*C[2] - B[2]*C[1]; B[2]*C[0] - B[0]*C[2]; B[0]*C[1] - B[1]*C[0]]
vector = [-345.361; -228.891; -68.1154]
mixed := A[0]*vector[0] + A[1]*vector[1] + A[2]*vector[2]
mixed = 9939.22
lenA := sqrt(A[0]^2 + A[1]^2 + A[2]^2)
lenA = 24.8479
# Вектор с наибольшей длинной
lenB := sqrt(B[0]^2 + B[1]^2 + B[2]^2)
lenB = 20.2658
lenC := sqrt(C[0]^2 + C[1]^2 + C[2]^2)
lenC = 20.9863
Lengths := [lenA; lenB; lenC]
MaxLength := max(Lengths)
Result := if(MaxLength == lenA, "Это А", if(MaxLength == lenB, "Это Б", "Это С"))
Result = "Это А"
N := 12
M[N, N] := N
M = [
    0, 0, 0, 0, 0, 0, 0, 0, 0, 0, 0, 0, 0;
    0, 0, 0, 0, 0, 0, 0, 0, 0, 0, 0, 0, 0;
    0, 0, 0, 0, 0, 0, 0, 0, 0, 0, 0, 0, 0;
    0, 0, 0, 0, 0, 0, 0, 0, 0, 0, 0, 0, 0;
    0, 0, 0, 0, 0, 0, 0, 0, 0, 0, 0, 0, 0;
    0, 0, 0, 0, 0, 0, 0, 0, 0, 0, 0, 0, 0;
    0, 0, 0, 0, 0, 0, 0, 0, 0, 0, 0, 0, 0;
    0, 0, 0, 0, 0, 0, 0, 0, 0, 0, 0, 0, 0;
    0, 0, 0, 0, 0, 0, 0, 0, 0, 0, 0, 0, 0;
    0, 0, 0, 0, 0, 0, 0, 0, 0, 0, 0, 0, 0;
    0, 0, 0, 0, 0, 0, 0, 0, 0, 0, 0, 0, 0;
    0, 0, 0, 0, 0, 0, 0, 0, 0, 0, 0, 0, 0;
    0, 0, 0, 0, 0, 0, 0, 0, 0, 0, 0, 0, 12
]
n := 0 .. N
m := 0 .. N
M[n, m] := round(-10 + 21*rnd(1))
sum(sum(M[i, j], j = 5 .. 7), i = 4 .. 6) = 24
M = [
    -7, 11, -7, -10, 1, 3, -7, -1, -9, 6, 1, 8, 10;
    1, 0, 8, 6, 11, 3, -4, 8, -2, 4, -10, -4, 2;
    8, 0, 6, 0, 6, 3, 5, 2, -7, -1, 1, 6, -6;
    0, 5, -7, -7, 5, -1, 10, -7, 7, -6, 7, -7, 5;
    -4, 4, 5, -7, 8, 1, -1, 10, 2, 0, 8, 0, 11;
    6, -6, 8, 1, -9, 2, 1, 8, 4, 8, -8, -3, -4;
    -7, 8, 3, -5, -10, 7, -6, 2, -8, 6, 1, -1, 5;
    -1, 2, 3, 1, 5, -6, -6, 0, -8, -8, 10, 9, -5;
    -1, 3, -1, 3, 8, 3, 2, -6, 2, -5, 3, 2, 0;
    6, 3, 7, 2, 9, 5, 4, -3, -4, -8, 8, -7, -8;
    3, 1, -1, 0, -7, 5, 7, 8, -4, -7, 6, 3, -8;
    4, -8, -5, 9, 4, 0, 0, 1, 4, 3, -10, -8, 8;
    6, -2, 2, 10, -6, -7, 10, -9, -9, -7, 8, 5, -10
]
sum(M[:, 10]) = 25
sum(transpose(M)[:, 11]) = 2
Sum := sum(sum(M[n, m], m), n) = 111
SumPol := sum(sum(M[n, m]*(M[n, m] > 0), m), n)
SumPol = 485
SumOtr := sum(sum(M[n, m]*(M[n, m] < 0), m), n)
SumOtr = -374
X := M[:, 0]
Y := transpose(M)[:, cols(M) - 1]
X = [-7; 1; 8; 0; -4; 6; -7; -1; -1; 6; 3; 4; 6]
Y = [6; -2; 2; 10; -6; -7; 10; -9; -9; -7; 8; 5; -10]
Skalar := X*Y = -156
# Задание 5
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y(x1) := e^(-(|x1|/3))*cos(x1)
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# Задание 6
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Δx := 0.25
x := -9, -9 + Δx .. 9
f(x) := if(x < 0, exp(x)*x^3, exp(-x)*x^3)
x = [
    -9; -8.75; -8.5; -8.25; -8; -7.75; -7.5; -7.25; -7; -6.75
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]
f(x) = [
    -0.0899657; -0.106157; -0.124955; -0.146701; -0.171757; -0.200504; -0.233332; -0.270632; -0.312776; -0.3601
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]
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# Задание 7
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Δx := π/4
x1 := -2*π
x2 := 2*π
Nx := (x2 - x1)/Δx
Nx = 16
i := 0 .. Nx
g(x) := sqrt(|x|)*sin(x)
x[i] := x1 + i*Δx
Y[i] := g(x[i])
X[i] := x[i]
X = [-6.28319; -5.49779; -4.71239; -3.92699; -3.14159; -2.35619; -1.5708; -0.785398; 0; 0.785398; 1.5708; 2.35619; 3.14159; 3.92699; 4.71239; 5.49779; 6.28319]
Y = [0; 1.65798; 2.1708; 1.40125; 0; -1.0854; -1.25331; -0.626657; 0; 0.626657; 1.25331; 1.0854; 0; -1.40125; -2.1708; -1.65798; 0]
WRITEPRN("X.txt") := X
WRITEPRN("Y.txt") := Y
XX := READPRN("X.txt")
YY := READPRN("Y.txt")
XX = [-6.283; -5.498; -4.712; -3.927; -3.142; -2.356; -1.571; -0.7854; 0; 0.7854; 1.571; 2.356; 3.142; 3.927; 4.712; 5.498; 6.283]
YY = [0; 1.658; 2.171; 1.401; 0; -1.085; -1.253; -0.6267; 0; 0.6267; 1.253; 1.085; 0; -1.401; -2.171; -1.658; 0]
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# Задание 8
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q(x) := e^(-x^2)
x := -3, -2.9 .. 3
p(x) := d/dx(q(x))
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# Задание 9
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f(x, y) := sin(sqrt(x^2 + y^2))/sqrt(x^2 + y^2)
# [component: inputs f]
# Задание 10
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x1 := -5
x2 := 5
Δx := 0.1
x^2 + (x - 2)*sin(x) == 5
f(x) := x^2 + (x - 2)*sin(x) - 5
x := x1, x1 + Δx .. x2
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444*x := 782536  # error: A name is required here.
z(x) := 444*x - 782536
x_my := 6
x0 := root(z(x_my), x_my) = 1762.47
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x1_my := -1.7
x2_my := 2.2
x1 := root(f(x1_my), x1_my)
x2 := root(f(x2_my), x2_my)
x2 = 2.19967
x1 = -1.32936
f(x2) = 6.05471e-12
f(x1) = 8.88178e-16
# Задание 11
x^2 + x*sin(2*x) - (x - 5)*cos(x) == 0
x1 := -4
x2 := 4
Δx := 0.1
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f(x) := x^2 + x*sin(2*x) - (x - 5)*cos(x)
x := x1, x1 + Δx .. x2
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x1 := root(f(x), x, -4, -2)
x1 = -2.97354
f(x1) = -1.77636e-15
x2 := root(f(x), x, -2, 0)
x2 = -1.93283
f(x2) = 0
# Задание 12
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x^3 + (4 - n)*x^2 + (3 - 4*n)*x - 3*n == 0
n := 1
f(x) := x^3 + (4 - n)*x^2 + (3 - 4*n)*x - 3*n
V := [-3*n; 3 - 4*n; 4 - n; 1]
V = [-3; -1; 3; 1]
R := polyroots(V)
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R = [-3; -1; 1]
# Задание 13
1.*Матричный*способ
n := 6
A := [n, n + 1, n + 2; n - 3, n - 2, n; n - 1, n, n + 1]
A = [6, 7, 8; 3, 4, 6; 5, 6, 7]
|A| = -1
# Свободные члены
B = [-6.28706; 13.5592; -13.6866]
A1 := [2, 3; 6, -5]
B1 := [5; 1]
B := [6*n + 8; 6*n - 7; 6*n + 2]
Проверка
[R1; R2] := A1^-1*B1
X := A^-1*B
X = [1; 2; 3]
x := X[0] = 1
A*X = [44; 29; 38]
y := X[1] = 2
[R1; R2] = [1; 1]
z := X[2] = 3
# 2 Given and find
x := 0
y := 0
z := 0
Given
n*x + (n + 1)*y + (n + 2)*z == 6*n + 8
(n - 3)*x + (n - 2)*y + n*z == 6*n - 7
(n - 1)*x + n*y + (n + 1)*z == 6*n + 2
V := Find(x, y, z)
V = [1; 2; 3]
# Задание 14
x^2/81 + y^2/16 == 1
t := 0, 0.01 .. 2*π
(x - 9)^2 + (y - 2)^2 == 25
xOkr(t) := 9 + 5*cos(t)
xEl(t) := 9*cos(t)
yOkr(t) := 2 + 5*sin(t)
yEl(t) := 4*sin(t)
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x := 0
y := 0
Given
x^2/81 + y^2/16 == 1
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(x - 9)^2 + (y - 2)^2 == 25
V := Find(x, y) = [4.23934; 3.52845]
x := 10
y := 2
Given
x^2/81 + y^2/16 == 1
(x - 9)^2 + (y - 2)^2 == 25
V := Find(x, y) = [6.9308; -2.55175]
# Задание 15
x := 0, 0.1 .. 10
f(x) := x*sin(x)
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x := 2
x1_max := Maximize(f, x)
x1_max = 2.02876
y1_max := f(x1_max)
x := 5
y1_max = 1.81971
x1_min := Minimize(f, x)
x1_min = 4.91318
y1_min := f(x1_min)
y1_min = -4.81447
x := 8
x2_max := Maximize(f, x)
x2_max = 7.97867
y2_max := f(x2_max)
y2_max = 7.91673
