Ax := 4
Bx := 4
Cx := 6
Dx := 6
Ay := 2
By := 8
Cy := 7
Dy := 3
X := [Ax; Bx; Cx; Dx; Ax]
Y := [Ay; By; Cy; Dy; Ay]
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# Находим координаты точки Р
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P := [Ax, Bx, Cx, Dx; Ay, By, Cy, Dy; 1, 1, 1, 1]
# Ур-е прямой проходящей через точки  B и C
k1 := 1
b1 := 2
Given
By == k1*Bx + b1
Cy == k1*Cx + b1
AA := Find(k1, b1)
# Ур-е прямой проходящей через точки  A  и D
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k2 := 1
b2 := 2
Given
Ay == k2*Ax + b2
Dy == k2*Dx + b2
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BB := Find(k2, b2)
# Находим точку пересечения прямых
Given
y == AA[0]*x + AA[1]  # Однородные координаты
x := 1
y := 2
y == BB[0]*x + BB[1]
VV := Find(x, y)
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P := [Ax, Bx, Cx, Dx; Ay, By, Cy, Dy; 1, 1, 1, 1]
# Параллельный сдвиг системы координат
# Поскольку угол поворота по часовой - угол считается отрицательным
# Поворот объекта на угол
φ := -90
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Ts(dx, dy) := [1, 0, -dx; 0, 1, -dy; 0, 0, 1]
# Смещаем систему координват в точку P
Ro(φ) := [cos(φ), -sin(φ), 0; sin(φ), cos(φ), 0; 0, 0, 1]
P1 := Ts(VV[0], VV[1])*P = [-6, -6, -4, -4; -3, 3, 2, -2; 1, 1, 1, 1]
φ_rad := φ*π/180 = -1.5708
# Поворачиваем объект
P2 := Ro(φ_rad)*P1 = [-3, 3, 2, -2; 6, 6, 4, 4; 1, 1, 1, 1]
# Обратное преобразование  для отображения начального положения
P3 := Ts(-VV[0], -VV[1])*P2 = [7, 13, 12, 8; 11, 11, 9, 9; 1, 1, 1, 1]
# X1,Y1  -  AD
Y1 := [P3[1, 0]; P3[1, 1]]
X1 := [P3[0, 0]; P3[0, 1]]
# X2,Y2 -  BC
Y2 := [P3[1, 2]; P3[1, 3]]
X2 := [P3[0, 2]; P3[0, 3]]
Xrot := [P3[0, 0]; P3[0, 1]; P3[0, 2]; P3[0, 3]; P3[0, 0]]
Yrot := [P3[1, 0]; P3[1, 1]; P3[1, 2]; P3[1, 3]; P3[1, 0]]
# замыкаем фигуру
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